*NODE, NSET=Nall
       1,5.000000000000e+00,5.000000000000e+00,-8.326672684689e-16
       2,5.000000000000e+00,-5.000000000000e+00,-8.326672684689e-16
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*ELEMENT, TYPE=B32, ELSET=Eall
     1,      1,     52,      5
     2,      2,     53,      5
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
*NSET,NSET=Nbound
1,
2,
3,
4,

*Material, Name=Al
*Elastic
70000,0.3

*BEAM SECTION, MATERIAL=Al,ELSET=Eall, OFFSET1=0.04, OFFSET2=0.04, SECTION=RECT
0.04,0.04
0,0,-1


*BOUNDARY
Nbound,1,6

*STEP
*STATIC
*CLOAD
46,	2,	-1000
51,	2,	-1000
*NODE PRINT,NSET=Nall
U
*EL PRINT,ELSET=Eall
S
E
*NODE FILE, output=3D
u
rf
*EL FILE
S, E
*END STEP
